// SBML level 2 version 1

model main()

  // Compartments:
  compartment cell in ext = 1;  // GO:0005623

  // Species:
  species CH2FH4 in cell = 0.26; CH2FH4 is "5,10-methylene-tetrahydrofolate";  // CHEBI:15636 kegg.compound:C00143
  species $dUMP in cell = 20.76;  // CHEBI:17622 kegg.compound:C00365
  species FH2f in cell = 0.0012; FH2f is "dihydrofolate free";  // isVersionOf CHEBI:15633 kegg.compound:C00415
  species FH2f in cell = 0.0012; FH2f is "dihydrofolate free";  // isVersionOf CHEBI:15633 kegg.compound:C00415
  species FFH2 in cell = 0.000332; FFH2 is "10-formyl-dihydrofolate";  // CHEBI:15634 kegg.compound:C03204
  species MTX1 in cell = 0;  // kegg.compound:C01937
  species MTX2 in cell = 0;  // kegg.compound:C01937
  species MTX3 in cell = 0;  // kegg.compound:C01937
  species MTX4 in cell = 0;  // kegg.compound:C01937
  species MTX5 in cell = 0;  // kegg.compound:C01937

  // Reactions:
  TYMS: CH2FH4 + $dUMP => FH2f; cell*(Vm*CH2FH4*dUMP/(dUMP*CH2FH4*(1 + MTX1/Ki21 + MTX2/Ki22 + MTX3/Ki23 + MTX4/Ki24 + MTX5/Ki25 + FH2f/Ki1) + Km1*dUMP*(FFH2/Ki1f*(MTX1/Ki21) + (1 + FFH2/Ki1f)*(1 + MTX2/Ki22 + MTX3/Ki23 + MTX4/Ki24 + MTX5/Ki25 + FH2f/Ki1)) + Km1*Km2*(1 + MTX2/Ki22 + MTX3/Ki23 + MTX4/Ki24 + MTX5/Ki25 + FH2f/Ki1)));  // modifiers: FFH2, MTX1, MTX2, MTX3, MTX4, MTX5; isVersionOf ec-code:2.1.1.45; kegg.reaction:R02101
    Vm = 58; Km1 = 2.5; Km2 = 1.8; Ki1 = 3; Ki1f = 1.6; Ki21 = 13; Ki22 = 0.08; Ki23 = 0.07; Ki24 = 0.065; Ki25 = 0.047;
end
