// SBML level 2 version 1

model main()

  // Compartments:
  compartment cell in ext = 1;  // GO:0005623

  // Species:
  species FH2f in cell = 0.0012; FH2f is "dihydrofolate free";  // isVersionOf CHEBI:15633 kegg.compound:C00415
  species FH4 in cell = 0.46; FH4 is "tetrahydrofolate";  // CHEBI:20506 kegg.compound:C00101
  species $FH2b in cell; FH2b is "dihydrofolate bound";  // isVersionOf CHEBI:15633 kegg.compound:C00415

  // Assignment rules:
  FH2b := FH2f*DHFRf/Keq;

  // Reactions:
  DHFReductase: FH2f => FH4; cell*kter*FH2b;  // modifiers: FH2b; isVersionOf ec-code:1.5.1.3; kegg.reaction:R00939
    kter = 2109.4;
end
