// SBML level 2 version 1

model main()

  // Compartments:
  compartment cell in ext = 1;  // GO:0005623

  // Species:
  species CH2FH4 in cell = 0.26; CH2FH4 is "5,10-methylene-tetrahydrofolate";  // CHEBI:15636 kegg.compound:C00143
  species $NADPH in cell = 294;  // CHEBI:16474 kegg.compound:C00005
  species CH3FH4 in cell = 1.63; CH3FH4 is "5-methyl-tetrahydrofolate";  // CHEBI:15641 kegg.compound:C00440
  species FH2f in cell = 0.0012; FH2f is "dihydrofolate free";  // isVersionOf CHEBI:15633 kegg.compound:C00415
  species MTX1 in cell = 0;  // kegg.compound:C01937
  species MTX2 in cell = 0;  // kegg.compound:C01937
  species MTX3 in cell = 0;  // kegg.compound:C01937
  species MTX4 in cell = 0;  // kegg.compound:C01937
  species MTX5 in cell = 0;  // kegg.compound:C01937

  // Reactions:
  MTHFR: CH2FH4 + $NADPH => CH3FH4; cell*(Vm*CH2FH4*NADPH/(NADPH*CH2FH4 + CH2FH4*Km2 + (NADPH + Km2)*Km1*(1 + MTX1/Ki21 + MTX2/Ki22 + MTX3/Ki23 + MTX4/Ki24 + MTX5/Ki25 + FH2f/Ki1)));  // modifiers: FH2f, MTX1, MTX2, MTX3, MTX4, MTX5; isVersionOf ec-code:1.5.1.20; kegg.reaction:R01224
    Vm = 224.8; Km1 = 50; Km2 = 50; Ki1 = 0.4; Ki21 = 59; Ki22 = 21.3; Ki23 = 7.68; Ki24 = 2.77; Ki25 = 1;
end
