// SBML level 2 version 1

model main()

  // Compartments:
  compartment cell in ext = 1;  // GO:0005623

  // Species:
  species CH3FH4 in cell = 1.63; CH3FH4 is "5-methyl-tetrahydrofolate";  // CHEBI:15641 kegg.compound:C00440
  species $homocysteine in cell = 10;  // CHEBI:17230 kegg.compound:C05330
  species FH4 in cell = 0.46; FH4 is "tetrahydrofolate";  // CHEBI:20506 kegg.compound:C00101

  // Reactions:
  MTR: CH3FH4 + $homocysteine => FH4; cell*(Vm*(homocysteine/Km2/(1 + homocysteine/Km2))*(CH3FH4/Km1)/(1 + CH3FH4/Km1));  // isVersionOf ec-code:2.1.1.13; kegg.reaction:R00946
    Vm = 22600; Km1 = 125; Km2 = 2900;
end
