// SBML level 2 version 1

model main()

  // Compartments:
  compartment cell in ext = 1;  // GO:0005623

  // Species:
  species FH4 in cell = 0.46; FH4 is "tetrahydrofolate";  // CHEBI:20506 kegg.compound:C00101
  species $formate in cell = 500;  // CHEBI:15740 kegg.compound:C00058
  species $ATP in cell = 2980;  // CHEBI:15422 kegg.compound:C00002
  species CHOFH4 in cell = 1; CHOFH4 is "10-formyl-tetrahydrofolate";  // CHEBI:15637 kegg.compound:C00234

  // Reactions:
  HCOOHtoCHOFH4: FH4 + $formate + $ATP => CHOFH4; cell*(Vm/((1 + Km1/FH4)*(1 + Km2/ATP)*(1 + Km3/formate)));  // isVersionOf ec-code:6.3.4.3; kegg.reaction:R00943
    Vm = 3600; Km1 = 230; Km2 = 56; Km3 = 1600;
end
