// SBML level 2 version 1

model main()

  // Compartments:
  compartment cell in ext = 1;  // GO:0005623

  // Species:
  species CHOFH4 in cell = 1; CHOFH4 is "10-formyl-tetrahydrofolate";  // CHEBI:15637 kegg.compound:C00234
  species $GAR in cell = 689.6;  // kegg.compound:C03838
  species FGAR in cell = 16.49;  // kegg.compound:C04376
  species FH4 in cell = 0.46; FH4 is "tetrahydrofolate";  // CHEBI:20506 kegg.compound:C00101
  species FH2f in cell = 0.0012; FH2f is "dihydrofolate free";  // isVersionOf CHEBI:15633 kegg.compound:C00415
  species FFH2 in cell = 0.000332; FFH2 is "10-formyl-dihydrofolate";  // CHEBI:15634 kegg.compound:C03204
  species MTX1 in cell = 0;  // kegg.compound:C01937
  species MTX2 in cell = 0;  // kegg.compound:C01937
  species MTX3 in cell = 0;  // kegg.compound:C01937
  species MTX4 in cell = 0;  // kegg.compound:C01937
  species MTX5 in cell = 0;  // kegg.compound:C01937

  // Reactions:
  GARFT: CHOFH4 + $GAR => FGAR + FH4; cell*(Vm*CHOFH4*GAR/(GAR*CHOFH4 + CHOFH4*Km2 + (GAR + Km2)*Km1*(1 + MTX1/Ki21 + MTX2/Ki22 + MTX3/Ki23 + MTX4/Ki24 + MTX5/Ki25 + FH2f/Ki1 + FFH2/Ki1f)));  // modifiers: FH2f, FFH2, MTX1, MTX2, MTX3, MTX4, MTX5; isVersionOf ec-code:2.1.2.2; kegg.reaction:R04325 reactome:REACT_1509
    Vm = 4126; Km1 = 4.9; Km2 = 52; Ki1 = 5; Ki1f = 1; Ki21 = 84; Ki22 = 60; Ki23 = 43; Ki24 = 31; Ki25 = 22;
end
