// SBML level 2 version 1

model main()

  // Compartments:
  compartment cell in ext = 1;  // GO:0005623

  // Species:
  species CHOFH4 in cell = 1; CHOFH4 is "10-formyl-tetrahydrofolate";  // CHEBI:15637 kegg.compound:C00234
  species AICAR in cell = 3.695;  // CHEBI:18406 kegg.compound:C04677
  species FH4 in cell = 0.46; FH4 is "tetrahydrofolate";  // CHEBI:20506 kegg.compound:C00101
  species FH2f in cell = 0.0012; FH2f is "dihydrofolate free";  // isVersionOf CHEBI:15633 kegg.compound:C00415
  species FFH2 in cell = 0.000332; FFH2 is "10-formyl-dihydrofolate";  // CHEBI:15634 kegg.compound:C03204
  species MTX1 in cell = 0;  // kegg.compound:C01937
  species MTX2 in cell = 0;  // kegg.compound:C01937
  species MTX3 in cell = 0;  // kegg.compound:C01937
  species MTX4 in cell = 0;  // kegg.compound:C01937
  species MTX5 in cell = 0;  // kegg.compound:C01937

  // Reactions:
  ATIC7: CHOFH4 + AICAR => FH4; cell*(Vm*CHOFH4*AICAR/(AICAR*CHOFH4 + CHOFH4*Km2 + (AICAR + Km2)*Km1*(1 + MTX1/Ki21 + MTX2/Ki22 + MTX3/Ki23 + MTX4/Ki24 + MTX5/Ki25 + FH2f/Ki1 + FFH2/Ki1f)));  // modifiers: FH2f, FFH2, MTX1, MTX2, MTX3, MTX4, MTX5; isVersionOf ec-code:2.1.2.3; kegg.reaction:R04560 reactome:REACT_812
    Vm = 31675; Km1 = 5.5; Km2 = 24; Ki1 = 2.89; Ki1f = 5.3; Ki21 = 40; Ki22 = 31.5; Ki23 = 2.33; Ki24 = 3.61; Ki25 = 5.89;
end
