// SBML level 2 version 1

model main()

  // Compartments:
  compartment cell in ext = 1;  // GO:0005623

  // Species:
  species CH2FH4 in cell = 0.26; CH2FH4 is "5,10-methylene-tetrahydrofolate";  // CHEBI:15636 kegg.compound:C00143
  species $NADP in cell = 6.73;  // CHEBI:18009 kegg.compound:C00006
  species CHOFH4 in cell = 1; CHOFH4 is "10-formyl-tetrahydrofolate";  // CHEBI:15637 kegg.compound:C00234

  // Reactions:
  MTHFD: CH2FH4 + $NADP => CHOFH4; cell*Vm*(CH2FH4/Km1/(1 + CH2FH4/Km1))*(NADP/Km2/(1 + NADP/Km2));  // hasPart ec-code:6.3.4.3 ec-code:1.5.1.5 kegg.reaction:R01655 kegg.reaction:R01220
    Vm = 68500; Km1 = 3; Km2 = 21.8;
end
